OpenVSP model (file version 5), 6 components.
Geometry view with OpenVSP parameter names; values to 6 digits, angles in degrees, lengths in the model's unit.
Overall bounding box: X_Min=0 X_Len=29.5402 Y_Min=-14.1016 Y_Len=28.2033 Z_Min=-2.01746 Z_Len=8.43966

Fuselage "B737-200 Fuselage - Front + Aft Rebuilt"
  location (X Y Z) 0 0 0, rotation 0 0 0
  bounding box size 29.5402 3.76001 4.05776
  Design: Length=29.5402
  cross sections:
    n   CurveBasis  XLocPercent  YLocPercent  ZLocPercent   shape
    0   0           0            0            -0.0170796    circle Circle_Diameter=0.05
    1   0           0.0429       0            -0.0142906    ellipse Ellipse_Height=1.84562 Ellipse_Width=1.50897
    2   0           0.1222       0            -0.00352468   ellipse Ellipse_Height=3.38663 Ellipse_Width=2.83418
    3   0           0.208        0            -0.00104213   ellipse Ellipse_Height=3.95819 Ellipse_Width=3.51907
    4   0           0.2652       0            -0.000796561  ellipse Ellipse_Height=3.96743 Ellipse_Width=3.61231
    5   0           0.3179       0            0             ellipse Ellipse_Height=4.01001 Ellipse_Width=3.69567
    6   0           0.3983       0            0.000521066   ellipse Ellipse_Height=4.01001 Ellipse_Width=3.76001
    7   0           0.6367       0            0.00180464    ellipse Ellipse_Height=3.97276 Ellipse_Width=3.76001
    8   0           0.7017       0            0.00556457    ellipse Ellipse_Height=3.75184 Ellipse_Width=3.65605
    9   0           0.8268       0            0.0166163     ellipse Ellipse_Height=2.88018 Ellipse_Width=2.82531
    10  0           0.9484       0            0.032304      ellipse Ellipse_Height=1.68728 Ellipse_Width=1.19085
    11  0           0.9825       0            0.0370679     ellipse Ellipse_Height=1.13946 Ellipse_Width=0.588447
    12  0           0.9959       0            0.040542      ellipse Ellipse_Height=0.523067 Ellipse_Width=0.287213
    13  0           1            0            0.0418535     circle Circle_Diameter=0.05

Wing "B737-200 Main Wing - REAL B737ABCD", child of "B737-200 Fuselage - Front + Aft Rebuilt"
  location (X Y Z) 8.81493 0 -0.633273, rotation 0 0 0
  symmetric about XZ
  bounding box size 8.72824 28.2033 2.09415
  totals: TotalSpan=28.3464 TotalProjectedSpan=28.1911 TotalChord=1.87858 TotalArea=46.5151 TotalAR=17.0856 MAC=3.41263
  root: chord 4.79384, twist 1, airfoil file "AOPT_bluntTE"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 BaseThickChord=0.120383 ThickChord=0.120383
  sections:
    n  Span       Root_Chord  Tip_Chord  Area      Sweep  Sweep_Location  Dihedral  Twist  Twist_Location  tip airfoil
    1  1.40771    4.79384     4.47959    13.6862   25     0.25            6         1      0.25            as above
    2  0.0201102  4.47959     4.4751     1         25     0.25            6         1      0.25            airfoil file "AOPT_F_bluntTE"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 BaseThickChord=0.120337 ThickChord=0.120337
    3  9.04024    4.4751      2.45702    1         25     0.25            6         1      0.25            as above
    4  0.0201102  2.45702     2.45253    0.049366  25     0.25            6         1      0.25            airfoil file "AOPT_bluntTE"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 BaseThickChord=0.120383 ThickChord=0.120383
    5  3.68503    2.45253     1.62991    7.52197   25     0.25            6         1      0.25            as above

Wing "B737-200 Horizontal Tail", child of "B737-200 Fuselage - Front + Aft Rebuilt"
  location (X Y Z) 23.1891 0.496639 0.9525, rotation 0 0 0
  symmetric about XZ
  bounding box size 5.12102 8.72883 0.923261
  totals: TotalSpan=7.75894 TotalProjectedSpan=7.70111 TotalChord=3.73579 TotalArea=28.9857 TotalAR=2.04608 MAC=3.907
  root: chord 5.12102, twist 0, airfoil file "A0012_bluntTE"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 BaseThickChord=0.12024 ThickChord=0.12024
  sections:
    n  Span     Root_Chord  Tip_Chord  Area     Sweep   Sweep_Location  Dihedral  Twist  Twist_Location  tip airfoil
    1  1.29316  5.12102     4.19753    6.02518  25.435  0.25            7         0      0.25            as above
    2  1.29316  4.19753     3.27404    4.83096  25.435  0.25            7         0      0.25            as above
    3  1.29316  3.27404     2.35055    3.63674  25.435  0.25            7         0      0.25            as above

Wing "B737-200 Vertical Tail", child of "B737-200 Fuselage - Front + Aft Rebuilt"
  location (X Y Z) 21.763 0 1.75558, rotation 90 0 0
  bounding box size 6.48638 0.779962 4.66662
  totals: TotalSpan=4.66662 TotalProjectedSpan=4.66662 TotalChord=4.45939 TotalArea=20.8103 TotalAR=1.04647 MAC=4.76651
  root: chord 6.48638, twist 0, airfoil file "A0012_bluntTE"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 BaseThickChord=0.12024 ThickChord=0.12024
  sections:
    n  Span     Root_Chord  Tip_Chord  Area     Sweep   Sweep_Location  Dihedral  Twist  Twist_Location  tip airfoil
    1  1.55554  6.48638     5.13505    9.03881  28.713  0.25            0         0      0.25            as above
    2  1.55554  5.13505     3.78372    6.93676  28.713  0.25            0         0      0.25            as above
    3  1.55554  3.78372     2.43239    4.83471  28.713  0.25            0         0      0.25            as above

Fuselage "B737-200 JT8D-9 Nacelles - NASABoeing constrained OML", child of "B737-200 Fuselage - Front + Aft Rebuilt"
  location (X Y Z) 10.4 5.07 -1.08, rotation 0 0.366667 0
  symmetric about XZ
  bounding box size 5.34312 11.4481 1.47683
  Design: Length=5.334
  cross sections:
    n  CurveBasis  XLocPercent  YLocPercent  ZLocPercent   shape
    0  0           0            0            0             ellipse Ellipse_Height=1.07442 Ellipse_Width=1.07442
    1  0           0.04         0            -0.000571429  ellipse Ellipse_Height=1.1938 Ellipse_Width=1.1938
    2  0           0.11         0            -0.00228571   ellipse Ellipse_Height=1.2954 Ellipse_Width=1.27
    3  0           0.19         0            -0.008        ellipse Ellipse_Height=1.44272 Ellipse_Width=1.3081
    4  0           0.34         0            -0.00685714   ellipse Ellipse_Height=1.3716 Ellipse_Width=1.2954
    5  0           0.54         0            -0.00457143   ellipse Ellipse_Height=1.3208 Ellipse_Width=1.2827
    6  0           0.7          0            -0.00285714   ellipse Ellipse_Height=1.2573 Ellipse_Width=1.2446
    7  0           0.82         0            -0.00114286   ellipse Ellipse_Height=1.1176 Ellipse_Width=1.1176
    8  0           0.91         0            0             ellipse Ellipse_Height=0.9144 Ellipse_Width=0.9144
    9  0           1            0            0             ellipse Ellipse_Height=0.762 Ellipse_Width=0.762

Wing "B737-200 JT8D Engine-to-Wing Fairings - revised", child of "B737-200 Fuselage - Front + Aft Rebuilt"
  location (X Y Z) 11.2458 5.07 -0.42, rotation 90 0 -2.45902
  symmetric about XZ
  bounding box size 3.67577 10.3547 0.493458
  totals: TotalSpan=0.673068 TotalProjectedSpan=0.673068 TotalChord=3.15224 TotalArea=2.12167 TotalAR=0.21352 MAC=3.18016
  root: chord 3.66468, twist 0, airfoil file "BOEING 737 ROOT AIRFOIL"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 BaseThickChord=0.153729 ThickChord=0.085
  sections:
    n  Span      Root_Chord  Tip_Chord  Area      Sweep  Sweep_Location  Dihedral  Twist  Twist_Location  tip airfoil
    1  0.112178  3.66468     3.32305    0.391935  3      0.25            0         0      0.25            airfoil file "BOEING 737 MIDSPAN AIRFOIL"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 BaseThickChord=0.125897 ThickChord=0.085
    2  0.112178  3.32305     2.98143    0.353612  3      0.25            0         0      0.25            airfoil file "BOEING 737 MIDSPAN AIRFOIL"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 BaseThickChord=0.100397 ThickChord=0.085
    3  0.112178  2.98143     2.63981    0.31529   3      0.25            0         0      0.25            airfoil file "BOEING 737 OUTBOARD AIRFOIL"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 BaseThickChord=0.10818 ThickChord=0.085
